*Node, NSET=Nall
1, 0, 0, 0
2, 0, 0, 10
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*Element, TYPE=C3D10, ELSET=Eall
633, 95, 98, 47, 196, 103, 197, 198, 200, 199, 201
634, 147, 121, 145, 196, 203, 202, 161, 205, 204, 206
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

***********************************************************
** Element sets for materials and FEM element type (solid, shell, beam)
** written by write_element_sets_material_and_femelement_type function
*ELSET,ELSET=MechanicalMaterialSolid
Eall

***********************************************************
** Node set for fixed constraint
** written by write_node_sets_constraints_fixed function
*NSET,NSET=FemConstraintFixed
1,
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
***********************************************************
** Materials
** written by write_materials function
** Young's modulus unit is MPa = N/mm2
** Density's unit is t/mm^3
** Thermal conductivity unit is kW/mm/K = t*mm/K*s^3
** Specific Heat unit is kJ/t/K = mm^2/s^2/K
**FreeCAD material name: Steel-Generic
*MATERIAL, NAME=MechanicalMaterial
*ELASTIC
200000 ,  0.300
*DENSITY
7.900e-09,
*CONDUCTIVITY
1,
*EXPANSION
1,
*SPECIFIC HEAT
1,

***********************************************************
** Sections
** written by write_femelementsets function
*SOLID SECTION, ELSET=MechanicalMaterialSolid, MATERIAL=MechanicalMaterial

***********************************************************
** One step is needed to calculate the mechanical analysis of FreeCAD
** loads are applied quasi-static, means without involving the time dimension
** written by write_step_begin_static_frequency function
*STEP
*CONTROLS,PARAMETERS=TIME INCREMENTATION
4,8,9,200,10,400,,200,
0.25,0.5,0.75,0.85,,,1.5,
*STATIC

***********************************************************
** Constraints
** written by write_constraints_fixed function
*BOUNDARY
FemConstraintFixed,1
FemConstraintFixed,2
FemConstraintFixed,3


***********************************************************
** Node loads
** written by write_constraints_force function
*CLOAD
** FemConstraintForce
** node loads on shape: Box:Face6
2,3,-0.0000000000000E+00
4,3,-0.0000000000000E+00
6,3,-0.0000000000000E+00
8,3,-0.0000000000000E+00
18,3,-0.0000000000000E+00
19,3,-8.3333333333333E+02
20,3,-8.3333333333333E+02
30,3,-0.0000000000000E+00
31,3,-8.3333333333333E+02
32,3,-8.3333333333333E+02
36,3,-0.0000000000000E+00
37,3,-8.3333333333333E+02
38,3,-8.3333333333333E+02
42,3,-0.0000000000000E+00
43,3,-8.3333333333333E+02
44,3,-8.3333333333333E+02
170,3,-0.0000000000000E+00
171,3,-0.0000000000000E+00
172,3,-0.0000000000000E+00
173,3,-0.0000000000000E+00
174,3,-0.0000000000000E+00
175,3,-1.6666666666667E+03
176,3,-1.6666666666667E+03
177,3,-1.6666666666667E+03
178,3,-1.6666666666667E+03
179,3,-1.6666666666667E+03
180,3,-1.6666666666667E+03
181,3,-1.6666666666667E+03
182,3,-1.6666666666667E+03
183,3,-1.6666666666667E+03
184,3,-1.6666666666667E+03
185,3,-1.6666666666667E+03
186,3,-1.6666666666667E+03
187,3,-1.6666666666667E+03
188,3,-1.6666666666667E+03
189,3,-1.6666666666667E+03
190,3,-1.6666666666667E+03
191,3,-1.6666666666667E+03
192,3,-1.6666666666667E+03
193,3,-1.6666666666667E+03
194,3,-1.6666666666667E+03


***********************************************************
** Element + CalculiX face + load in [MPa]
** written by write_constraints_pressure function
*DLOAD
** Load on face Face2
635,P1,1000.0
638,P3,1000.0
641,P2,1000.0
668,P1,1000.0
670,P1,1000.0
688,P1,1000.0
693,P3,1000.0
699,P2,1000.0
700,P3,1000.0
707,P2,1000.0
708,P4,1000.0
710,P4,1000.0
711,P2,1000.0
722,P3,1000.0
737,P3,1000.0
757,P3,1000.0

***********************************************************
** Outputs --> frd file
** written by write_outputs_types function
*NODE FILE
U
*EL FILE
S, E
** outputs --> dat file
*NODE PRINT , NSET=Nall
U
*EL PRINT , ELSET=Eall
S

***********************************************************
** written by write_step_end function
*END STEP

***********************************************************
** CalculiX Input file
** written by write_footer function
**   written by    --> FreeCAD 0.16.5838 +1 (Git)
**   written on    --> Mon Oct 26 18:28:42 2015
**   file name     -->
**   analysis name --> MechanicalAnalysis
**
**
**
**   Units
**
**   Geometry (mesh data)        --> mm
**   Materials (Young's modulus) --> N/mm2 = MPa
**   Loads (nodal loads)         --> N
**
